# OpenSim document version 30000
Model Tug_of_War:
  length_units: meters
  force_units: N
  gravity: 0 0 0
  credits:
    Author: The OpenSim Teams License: Creative Commons (CCBY 3.0). You are free to distribute, remix, tweak, and build upon this work, even commercially, as long as you credit us for the original creation. http://creativecommons.org/licenses/by/3.0/
  BodySet:
    Body ground: mass=0 mass_center=(0 0 0) inertia_xx=0 inertia_yy=0 inertia_zz=0
        meshes=(checkered_floor.vtp block.vtp)
    Body block: mass=20 mass_center=(0 0 0) inertia_xx=0.1333333 inertia_yy=0.1333333 inertia_zz=0.1333333
        meshes=block.vtp
      CustomJoint ground_block: parent_body=ground location_in_parent=(0 0 0) location=(0 0 0)
        Coordinate block_rx: motion_type=rotational default_value=0 range=(-0.416 0.37) clamped=false
        Coordinate block_ry: motion_type=rotational default_value=0.5 range=(-0.416 0.37) clamped=false
        Coordinate block_rz: motion_type=rotational default_value=-0.26179 range=(-0.416 0.37) clamped=false
        Coordinate block_tx: motion_type=translational default_value=0.5 range=(-0.416 0.37) clamped=false
        Coordinate block_ty: motion_type=translational default_value=-0.05 range=(-0.416 0.37) clamped=false
        Coordinate block_tz: motion_type=translational default_value=0 range=(-0.3 0.3) clamped=false
        SpatialTransform:
          TransformAxis rotation1: coordinates=block_rz axis=(0 0 1) LinearFunction(coefficients=1 0)
          TransformAxis rotation2: coordinates=block_ry axis=(0 1 0) LinearFunction(coefficients=1 0)
          TransformAxis rotation3: coordinates=block_rx axis=(1 0 0) LinearFunction(coefficients=1 0)
          TransformAxis translation1: coordinates=block_tz axis=(0 0 1) LinearFunction(coefficients=1 0)
          TransformAxis translation2: coordinates=block_ty axis=(0 1 0) LinearFunction(coefficients=1 0)
          TransformAxis translation3: coordinates=block_tx axis=(1 0 0) LinearFunction(coefficients=1 0)
